// SBML level 3 version 1

model ch0_dr0_wuFalse_exdataset1()

  // Compartments:
  compartment Compartment = 1;

  // Species:
  species statemetL_c in Compartment = 4.33e-5/Compartment;
  species stateamet_c in Compartment = 0.001414214/Compartment;
  species stateahcys_c in Compartment = 0.001/Compartment;
  species statehcysL_c in Compartment = 0.0005/Compartment;
  species state5mthf_c in Compartment = 5.94e-5/Compartment;

  // Parameters:
  pdgrsmetLsource = 160.953;
  pdgrsMAT1METAT = -110.238;
  pdgrsMAT3METAT = -110.238;
  pdgrsMETHGenMETH = -88.936;
  pdgrsGNMT1GNMT = 32.9797;
  pdgrsAHC1AHC = 23.539;
  pdgrsMS1MS = 1.473;
  pdgrsBHMT1BHMT = -6.8863;
  pdgrsCBS1CBS = -24.8617;
  pdgrsMTHFR1MTHFR = -40.303;
  pdgrsPROT1PROT = -160.953;
  pdrainmetLsource = 0.000850127;
  pkcatMAT1 = 7.89577;
  pkcatMAT3 = 19.9215;
  pkcatMETHGen = 1.15777;
  pkcatGNMT1 = 10.5307;
  pkcatAHC1 = 234.284;
  pkcatMS1 = 1.77471;
  pkcatBHMT1 = 13.7676;
  pkcatCBS1 = 7.02307;
  pkcatMTHFR1 = 3.1654;
  pkcatPROT1 = 0.264744;
  pkmMAT1metLc = 0.000106919;
  pkmMAT1atpc = 0.00203015;
  pkmMAT1pic = 1.64872;
  pkmMAT1ppic = 1.64872;
  pkmMAT1ametc = 1.64872;
  pkmMAT3metLc = 0.00113258;
  pkmMAT3atpc = 0.00236759;
  pkmMAT3pic = 1.64872;
  pkmMAT3ppic = 1.64872;
  pkmMAT3ametc = 1.64872;
  pkmMETHGenametc = 9.37e-6;
  pkmMETHGenahcysc = 1.64872;
  pkmGNMT1ametc = 0.000520015;
  pkmGNMT1glyc = 0.00253545;
  pkmGNMT1ahcysc = 1.1e-5;
  pkmGNMT1sarcsc = 1e-7;
  pkmAHC1ahcysc = 2.32e-5;
  pkmAHC1adnc = 5.66e-6;
  pkmAHC1hcysLc = 1.06e-5;
  pkmMS1hcysLc = 1.71e-6;
  pkmMS15mthfc = 6.94e-5;
  pkmMS1metLc = 1.64872;
  pkmMS1thfc = 1.64872;
  pkmBHMT1hcysLc = 1.98e-5;
  pkmBHMT1glybc = 0.00845898;
  pkmBHMT1metLc = 1.64872;
  pkmBHMT1dmglyc = 1.64872;
  pkmCBS1hcysLc = 4.24e-5;
  pkmCBS1serLc = 2.83e-6;
  pkmCBS1cystLc = 1.64872;
  pkmMTHFR1mlthfc = 8.08e-5;
  pkmMTHFR1nadphc = 2.09e-5;
  pkmMTHFR1nadpc = 1.64872;
  pkmMTHFR15mthfc = 1.64872;
  pkmPROT1metLc = 4.39e-5;
  pkiMAT1METATametc = 0.000346704;
  pkiMETHGenMETHahcysc = 5.56e-6;
  pkiGNMT1GNMTahcysc = 5.31e-5;
  pdissociationconstantMAT3ametc = 0.000316641;
  pdissociationconstantMAT3metLc = 0.00059999;
  pdissociationconstantGNMT1ametc = 1.98e-5;
  pdissociationconstantGNMT1mlthfc = 0.000228576;
  pdissociationconstantCBS1ametc = 9.3e-5;
  pdissociationconstantMTHFR1ametc = 1.46e-5;
  pdissociationconstantMTHFR1ahcysc = 2.45e-6;
  ptransferconstantMAT3 = 0.107657;
  ptransferconstantGNMT1 = 131.207;
  ptransferconstantCBS1 = 1.03452;
  ptransferconstantMTHFR1 = 0.392035;
  pconcunbalancedatpc = 0.00131546;
  pconcunbalancedpic = 0.001;
  pconcunbalancedppic = 0.000500016;
  pconcunbalancedglyc = 0.00145177;
  pconcunbalancedsarcsc = 1e-7;
  pconcunbalancedadnc = 1.01e-6;
  pconcunbalancedthfc = 2.24e-5;
  pconcunbalancedmlthfc = 3.15e-6;
  pconcunbalancedglybc = 0.00106758;
  pconcunbalanceddmglyc = 5e-5;
  pconcunbalancedserLc = 0.0015873;
  pconcunbalancednadpc = 1.22e-6;
  pconcunbalancednadphc = 0.000245139;
  pconcunbalancedcystLc = 2.24e-6;
  pconcenzymeMAT1 = 0.000961712;
  pconcenzymeMAT3 = 0.00098812;
  pconcenzymeMETHGen = 0.00103396;
  pconcenzymeGNMT1 = 0.000983692;
  pconcenzymeAHC1 = 0.000977878;
  pconcenzymeMS1 = 0.00105094;
  pconcenzymeBHMT1 = 0.000996603;
  pconcenzymeCBS1 = 0.00134056;
  pconcenzymeMTHFR1 = 0.0010054;
  pconcenzymePROT1 = 0.000995525;

  // Assignment rules:
  t := time;

  // Rate rules:
  statemetL_c' = 1*pdrainmetLsource + (-1*pconcenzymeMAT1*pkcatMAT1*1*(statemetL_c/pkmMAT1metLc*(pconcunbalancedatpc/pkmMAT1atpc)*1/((1 + statemetL_c/pkmMAT1metLc)^1*(1 + pconcunbalancedatpc/pkmMAT1atpc)^1 + stateamet_c/pkiMAT1METATametc + 0))*1*0) + (-1*pconcenzymeMAT3*pkcatMAT3*1*(statemetL_c/pkmMAT3metLc*(pconcunbalancedatpc/pkmMAT3atpc)*1/((1 + statemetL_c/pkmMAT3metLc)^1*(1 + pconcunbalancedatpc/pkmMAT3atpc)^1 + 0 + 0))*(1/(1 + ptransferconstantMAT3*(1/((1 + statemetL_c/pkmMAT3metLc)^1*(1 + pconcunbalancedatpc/pkmMAT3atpc)^1 + 0 + 0)*1/(1 + stateamet_c/pdissociationconstantMAT3ametc + statemetL_c/pdissociationconstantMAT3metLc))^2))*0) + 1*pconcenzymeMS1*pkcatMS1*1*(statehcysL_c/pkmMS1hcysLc*(state5mthf_c/pkmMS15mthfc)*1/((1 + statehcysL_c/pkmMS1hcysLc)^1*(1 + state5mthf_c/pkmMS15mthfc)^1 + 0 + 0))*1*0 + 1*pconcenzymeBHMT1*pkcatBHMT1*1*(statehcysL_c/pkmBHMT1hcysLc*(pconcunbalancedglybc/pkmBHMT1glybc)*1/((1 + statehcysL_c/pkmBHMT1hcysLc)^1*(1 + pconcunbalancedglybc/pkmBHMT1glybc)^1 + 0 + 0))*1*0 + (-1*pconcenzymePROT1*pkcatPROT1*1*(statemetL_c/pkmPROT1metLc*1/((1 + statemetL_c/pkmPROT1metLc)^1 + 0 + 0))*1*0);
  stateamet_c' = 1*pconcenzymeMAT1*pkcatMAT1*1*(statemetL_c/pkmMAT1metLc*(pconcunbalancedatpc/pkmMAT1atpc)*1/((1 + statemetL_c/pkmMAT1metLc)^1*(1 + pconcunbalancedatpc/pkmMAT1atpc)^1 + stateamet_c/pkiMAT1METATametc + 0))*1*0 + 1*pconcenzymeMAT3*pkcatMAT3*1*(statemetL_c/pkmMAT3metLc*(pconcunbalancedatpc/pkmMAT3atpc)*1/((1 + statemetL_c/pkmMAT3metLc)^1*(1 + pconcunbalancedatpc/pkmMAT3atpc)^1 + 0 + 0))*(1/(1 + ptransferconstantMAT3*(1/((1 + statemetL_c/pkmMAT3metLc)^1*(1 + pconcunbalancedatpc/pkmMAT3atpc)^1 + 0 + 0)*1/(1 + stateamet_c/pdissociationconstantMAT3ametc + statemetL_c/pdissociationconstantMAT3metLc))^2))*0 + (-1*pconcenzymeMETHGen*pkcatMETHGen*1*(stateamet_c/pkmMETHGenametc*1/((1 + stateamet_c/pkmMETHGenametc)^1 + stateahcys_c/pkiMETHGenMETHahcysc + 0))*1*0) + (-1*pconcenzymeGNMT1*pkcatGNMT1*1*(stateamet_c/pkmGNMT1ametc*(pconcunbalancedglyc/pkmGNMT1glyc)*1/((1 + stateamet_c/pkmGNMT1ametc)^1*(1 + pconcunbalancedglyc/pkmGNMT1glyc)^1 + stateahcys_c/pkiGNMT1GNMTahcysc + 0))*(1/(1 + ptransferconstantGNMT1*(1/((1 + stateamet_c/pkmGNMT1ametc)^1*(1 + pconcunbalancedglyc/pkmGNMT1glyc)^1 + stateahcys_c/pkiGNMT1GNMTahcysc + 0)*(1 + pconcunbalancedmlthfc/pdissociationconstantGNMT1mlthfc)/(1 + stateamet_c/pdissociationconstantGNMT1ametc))^4))*0);
  stateahcys_c' = 1*pconcenzymeMETHGen*pkcatMETHGen*1*(stateamet_c/pkmMETHGenametc*1/((1 + stateamet_c/pkmMETHGenametc)^1 + stateahcys_c/pkiMETHGenMETHahcysc + 0))*1*0 + 1*pconcenzymeGNMT1*pkcatGNMT1*1*(stateamet_c/pkmGNMT1ametc*(pconcunbalancedglyc/pkmGNMT1glyc)*1/((1 + stateamet_c/pkmGNMT1ametc)^1*(1 + pconcunbalancedglyc/pkmGNMT1glyc)^1 + stateahcys_c/pkiGNMT1GNMTahcysc + 0))*(1/(1 + ptransferconstantGNMT1*(1/((1 + stateamet_c/pkmGNMT1ametc)^1*(1 + pconcunbalancedglyc/pkmGNMT1glyc)^1 + stateahcys_c/pkiGNMT1GNMTahcysc + 0)*(1 + pconcunbalancedmlthfc/pdissociationconstantGNMT1mlthfc)/(1 + stateamet_c/pdissociationconstantGNMT1ametc))^4))*0 + (-1*pconcenzymeAHC1*pkcatAHC1*(1 - exp((pdgrsAHC1AHC + 2.4788191*(-1*ln(stateahcys_c) + 1*ln(pconcunbalancedadnc) + 1*ln(statehcysL_c)))/2.4788191))*(stateahcys_c/pkmAHC1ahcysc*1/((1 + stateahcys_c/pkmAHC1ahcysc)^1 + 0 + ((1 + pconcunbalancedadnc/pkmAHC1adnc)^1*(1 + statehcysL_c/pkmAHC1hcysLc)^1 - 1)))*1*0);
  statehcysL_c' = 1*pconcenzymeAHC1*pkcatAHC1*(1 - exp((pdgrsAHC1AHC + 2.4788191*(-1*ln(stateahcys_c) + 1*ln(pconcunbalancedadnc) + 1*ln(statehcysL_c)))/2.4788191))*(stateahcys_c/pkmAHC1ahcysc*1/((1 + stateahcys_c/pkmAHC1ahcysc)^1 + 0 + ((1 + pconcunbalancedadnc/pkmAHC1adnc)^1*(1 + statehcysL_c/pkmAHC1hcysLc)^1 - 1)))*1*0 + (-1*pconcenzymeMS1*pkcatMS1*1*(statehcysL_c/pkmMS1hcysLc*(state5mthf_c/pkmMS15mthfc)*1/((1 + statehcysL_c/pkmMS1hcysLc)^1*(1 + state5mthf_c/pkmMS15mthfc)^1 + 0 + 0))*1*0) + (-1*pconcenzymeBHMT1*pkcatBHMT1*1*(statehcysL_c/pkmBHMT1hcysLc*(pconcunbalancedglybc/pkmBHMT1glybc)*1/((1 + statehcysL_c/pkmBHMT1hcysLc)^1*(1 + pconcunbalancedglybc/pkmBHMT1glybc)^1 + 0 + 0))*1*0) + (-1*pconcenzymeCBS1*pkcatCBS1*1*(statehcysL_c/pkmCBS1hcysLc*(pconcunbalancedserLc/pkmCBS1serLc)*1/((1 + statehcysL_c/pkmCBS1hcysLc)^1*(1 + pconcunbalancedserLc/pkmCBS1serLc)^1 + 0 + 0))*(1/(1 + ptransferconstantCBS1*(1/((1 + statehcysL_c/pkmCBS1hcysLc)^1*(1 + pconcunbalancedserLc/pkmCBS1serLc)^1 + 0 + 0)*1/(1 + stateamet_c/pdissociationconstantCBS1ametc))^2))*0);
  state5mthf_c' = -1*pconcenzymeMS1*pkcatMS1*1*(statehcysL_c/pkmMS1hcysLc*(state5mthf_c/pkmMS15mthfc)*1/((1 + statehcysL_c/pkmMS1hcysLc)^1*(1 + state5mthf_c/pkmMS15mthfc)^1 + 0 + 0))*1*0 + 1*pconcenzymeMTHFR1*pkcatMTHFR1*1*(pconcunbalancedmlthfc/pkmMTHFR1mlthfc*(pconcunbalancednadphc/pkmMTHFR1nadphc)*1/((1 + pconcunbalancedmlthfc/pkmMTHFR1mlthfc)^1*(1 + pconcunbalancednadphc/pkmMTHFR1nadphc)^1 + 0 + 0))*(1/(1 + ptransferconstantMTHFR1*(1/((1 + pconcunbalancedmlthfc/pkmMTHFR1mlthfc)^1*(1 + pconcunbalancednadphc/pkmMTHFR1nadphc)^1 + 0 + 0)*(1 + stateamet_c/pdissociationconstantMTHFR1ametc)/(1 + stateahcys_c/pdissociationconstantMTHFR1ahcysc))^2))*0;
end
